V_0 := 54
I := 100*10^-3
R := 300
C := 12*10^-6
V(t) := R*I + (V_0 - R*I)*e^(-t/(R*C))
i(t) := 1000*((-V_0/R + I)*e^(-t/(R*C)))
t := 0, 0.001 .. 0.03
i_2(t) := 1000*V(t)/R → 80*e^(-2500*t/9) + 100
i_3(t) := 100 - i_2(t) → -80*e^(-2500*t/9)
# [plot: i(t), i_2(t) vs t]
i(0) = -80
i_2(0) = 180
limit(i(t), t → ∞) → 0
limit(i_2(t), t → ∞) → 100
# [plot: V(t) vs t]
